f2(x, y) := -3/(1 + ((x - 3)/2)^2 + (y - 2)^2) + (-3/(1 + (x - 1)^2 + ((y - 2)/3)^2))
f(x, y) := x^2 - x*y + 3*y^2
z1 := [-5; -5; -5; -5; -5; -5]
x1 := [10; 9.999999954; 1.138832364; 1.138832491; 1.138884138; 1.138832851]
y1 := [-8; 2.002232434; 1.998240285; 1.998240285; 1.998243505; 2.000000031]
f1(x, y) := 100*(y - x^2)^2 + (1 - x)^2
# [component: inputs f2, (x1, y1, z1)]
# [component: inputs f2]
