pen1(x, y) := x - y - 1
pen2(x, y) := -x
pen3(x, y) := x - 4
pen4(x, y) := x^2 + y^2 - 1
x1 := [0; 0.091222769; 0.083926653; 0.083867402]
y1 := [1; -0.245812258; -0.249685821; -0.249717179]
z1 := [29; 26.48934844; 26.40928159; 26.40863207]
h1(x, y) := (pen1(x, y) + |pen1(x, y)|)^1/2
h2(x, y) := (pen2(x, y) + |pen2(x, y)|)^2/2
h3(x, y) := (pen3(x, y) + |pen3(x, y)|)^1/2
s1(x, y) := -ln(-pen1(x, y))
s2(x, y) := -ln(-pen2(x, y))
s3(x, y) := -ln(-pen3(x, y))
g1(x, y) := -1/pen1(x, y)
g2(x, y) := -1/pen2(x, y)
g3(x, y) := -1/pen3(x, y)
x2 := [-4.00000000; 4.00000000; 3.99997001; 1.13909695; 1.17182599; 1.17183731]
y2 := [1.00000000; 3.00000000; 4.12084308; 2.05759436; 2.05846446; 2.05846445]
z2 := [-0.32541993; -1.63003663; -0.80764957; -4.54708144; -4.54423816; -4.54423634]
f(x, y) := -3/(1 + ((x - 3)/2)^2 + (y - 2)^2) + (-3/(1 + (x - 1)^2 + ((y - 2)/3)^2))
f_h(x, y) := f(x, y) + 1*g1(x, y) + 1*g1(x, y) + 1*g1(x, y)
# [component: inputs f, (x2, y2, z2), f_h]
